# Bulk CO2 molecular fluid, fix ilves
# Rigid CO2 TraPPE model
# [Potoff and J.I. Siepmann, Vapor-liquid equilibria of
# mixtures containing alkanes, carbon dioxide and
# nitrogen AIChE J., 47,1676-1682 (2001)].
#
# Note: a near-linear (or exactly linear) triatomic like CO2 is a
# challenging case for any iterative constraint solver because the
# Jacobian is rank-deficient at theta = 180 deg.  We use the
# linearangle handling and a moderately large |B-M| clamp (Lmin=0.1,
# corresponding to ~9 deg off linear), plus an initial minimize, to
# keep the solver stable.  For production simulations of truly rigid
# linear molecules, fix rigid/small is the recommended approach.

# variables available on command line

variable        temp index 338.0
variable        lbox index 25.0
variable        spacing index 5.0

# global model settings

units           real
atom_style      full
boundary        p p p
pair_style      lj/cut/coul/long  14
pair_modify     mix arithmetic tail yes
kspace_style    pppm 0.00001
bond_style      harmonic
angle_style     harmonic

# box, start molecules on simple cubic lattice

lattice         sc ${spacing}
region          box block 0 ${lbox} 0 ${lbox} 0 ${lbox} units box
create_box      2 box                       &
                bond/types 1                &
                angle/types 1               &
                extra/bond/per/atom 2       &
                extra/angle/per/atom 1      &
                extra/special/per/atom 2
molecule        co2mol CO2.txt
create_atoms    0 box mol co2mol 464563 units box

# CO2 TraPPE model

pair_coeff      1   1  0.053649   2.8
pair_coeff      2   2  0.156973   3.05
bond_coeff      1       0       1.16
angle_coeff     1       0       180

# masses

mass 1 12.0107
mass 2 15.9994

# MD settings

group           co2 type 1 2
neighbor        2.0 bin
neigh_modify    every 1 delay 0 check yes
velocity        all create ${temp} 54654
timestep        1.0

# rigid constraints with thermostat

fix             rigid all ilves 0.00001 25 1000 t 1 2 a 1 #linearangle 165 0.0333333
fix             move  all nvt temp ${temp} ${temp} 100.0

thermo_style    custom step temp press pe ke
thermo          100

# minimize first to relax initial lattice overlap.
minimize 0.0 0.0 1000 10000
reset_timestep 0


run             50000
