#this example pulls a Silicon block with surface roughness in tension
units       metal

dimension    3
boundary     s s s

#CAC atom style
atom_style     cac 8 2

#use CAC style for load balancing non uniform
#element scales; this example has a uniform mesh
#comm_style cac

#turn off newton since reverse communication is not needed
newton off

#read model data file using CAC format
read_data     Dislocation_Model.txt

#example pair styles and pair_coeff commands

pair_style   cac/sw
pair_coeff     * * Si.sw Si


timestep     0.001

restart      10000 restart.*

#computes the kinetic energy using nodal velocities
compute Ntemp all cac/nodal/temp

thermo_style custom step c_Ntemp
#thermo_style custom step temp
thermo	     100

#required to weight the elements and load balance non-uniform meshes
#compute Eweight all cac/quad/count
#variable Eweights atom c_Eweight
#fix comm all balance 1000 1.10 rcb weight var Eweights

#usual lammps output routine; outputs nodal temp.

fix callertest all ave/time 1 1 1 c_Ntemp file Node_temps.txt

#rescales the temperature in the same way the lammps version #does; this one just uses nodal velocities instead
#fix tempre all cac/temp/rescale 1 0.001 10 0.02 1.0


region boundary block EDGE EDGE EDGE 250 EDGE EDGE units box
region loading block EDGE EDGE 7750 EDGE EDGE EDGE units box
region scan block EDGE EDGE 4000 5000 EDGE EDGE units box
group BD region boundary
group scan region scan
group displace region loading
group conditions union BD displace
group integrate subtract all conditions

#NVE integrator for nodal quantities
fix NVE integrate cac/nve


#outputs all the nodal positions in the specified group
dump	      1 all cac/nodal/positions 8000 CACmesh.txt

#outputs the velocity squared for every dimension of nodal velocities for every element
dump	      2 all cac/kinetic/energy 8000 CACmeshkin.txt

#outputs atomic resolution of the model group; can be useful for ovito/vmd diagnostics
#dump	      5 scan cac/xyz 5000 atom_plot.txt

#outputs initial nodal positions to calculate deformation if they are not available
#write_dump all cac/initial/nodes cac/initial/nodes.txt


#can be used to fix nodal forces in the specified group to a value
fix	BCs BD cac/setforce 0 0 0


label loop
#set nodal velocities
fix	loading displace cac/setvelocity 0 0.3 0

#dampen periodically to prevent model instability due to kinetic energy

run 4000
unfix loading
#use viscous dampening on nodal velocities
fix visc all cac/viscous 0.01
run 1000
unfix visc
jump in2dislocation.dm loop
